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/BATCH
/COM,ANSYS RELEASE 2023 R2           BUILD 23.2      UP20230531       16:37:28
/input,menust,tmp,''
/COM,ANSYS RELEASE 2023 R2           BUILD 23.2      UP20230531       16:37:28
/GST,ON
/PLO,INFO,3
/GRO,CURL,ON
/CPLANE,1
WPSTYLE,,,,,,,,0
/POST1
/SHOW,WIN32C
FINISH
/SOL
/STATUS,SOLU
SOLVE
FINISH
/POST1
PRNSOL,U,COMP
FINISH
! /EXIT,NOSAV
/BATCH
/COM,ANSYS RELEASE 2023 R2           BUILD 23.2      UP20230531       15:59:25
/input,menust,tmp,''
/COM,ANSYS RELEASE 2023 R2           BUILD 23.2      UP20230531       15:59:25
/GST,ON
/PLO,INFO,3
/GRO,CURL,ON
/CPLANE,1
WPSTYLE,,,,,,,,0
/POST1
FINISH
! /EXIT,NOSAV
/BATCH
/COM,ANSYS RELEASE 2023 R2           BUILD 23.2      UP20230531       09:36:33
/input,menust,tmp,''
/COM,ANSYS RELEASE 2023 R2           BUILD 23.2      UP20230531       09:36:33
/GST,ON
/PLO,INFO,3
/GRO,CURL,ON
/CPLANE,1
WPSTYLE,,,,,,,,0
/POST1
